// SBML level 3 version 2

model combined_model_of__combined_model_of__combined_model_of__combined_model_of__combined_model_of__combined_model_of__biocrnpyler_339038_biocrnpyler_658720_biocrnpyler_295210_biocrnpyler_617483_biocrnpyler_883926_biocrnpyler_252167_biocrnpyler_983878()
  // model units - substance: mole, time: second, volume: litre, area: square_metre, length: metre, extent: mole

  // Compartments:
  compartment default_atpsyn_txtlbiocrnpyler_339038_combined_combined = 7e-6;
  compartment default_atpsynthesisbiocrnpyler_295210 = 1e-6;
  compartment default_atp_usebiocrnpyler_617483 = 1e-6;
  compartment default_combined_combined = 3e-6;
  compartment default_pp_txtlbiocrnpyler_883926 = 1e-6;
  compartment default_combined_combined_1 = 4e-6;
  compartment default_pp_mibiocrnpyler_252167 = 1e-6;
  compartment default_combined_combined_2 = 5e-6;
  compartment default_protontransportbiocrnpyler_983878 = 1e-6;
  compartment default_combined_combined_3 = 6e-6;

  // Species:
  species rna_atpsyn_atpsyn_txtlbiocrnpyler_339038 in default_atpsyn_txtlbiocrnpyler_339038_combined_combined = 0;
  species dna_atpsyn_atpsyn_txtlbiocrnpyler_339038 in default_atpsyn_txtlbiocrnpyler_339038_combined_combined = 10/default_atpsyn_txtlbiocrnpyler_339038_combined_combined;
  species complex_dna_atpsyn_protein_RNAP_machinery_atpsyn_txtlbiocrnpyler_339038 in default_atpsyn_txtlbiocrnpyler_339038_combined_combined = 0;
  species complex_protein_Ribo_machinery_rna_atpsyn_atpsyn_txtlbiocrnpyler_339038 in default_atpsyn_txtlbiocrnpyler_339038_combined_combined = 0;
  species complex_protein_RNAse_machinery_rna_atpsyn_atpsyn_txtlbiocrnpyler_339038 in default_atpsyn_txtlbiocrnpyler_339038_combined_combined = 0;
  species protein_atpsyn_atpsyn_txtlbiocrnpyler_339038_1_combined in default_atpsyn_txtlbiocrnpyler_339038_combined_combined = 0;
  species protein_atpsyn_b_atpsyn_mibiocrnpyler_658720_1_combined in default_atpsynthesisbiocrnpyler_295210 = 0;
  species rna_proton_pump_pp_txtlbiocrnpyler_883926 in default_pp_txtlbiocrnpyler_883926 = 0;
  species dna_proton_pump_pp_txtlbiocrnpyler_883926 in default_pp_txtlbiocrnpyler_883926 = 10/default_pp_txtlbiocrnpyler_883926;
  species protein_RNAP_machinery_atpsyn_txtlbiocrnpyler_339038_1_combined in default_pp_txtlbiocrnpyler_883926 = 10/default_pp_txtlbiocrnpyler_883926;
  species protein_Ribo_machinery_atpsyn_txtlbiocrnpyler_339038_1_combined in default_pp_txtlbiocrnpyler_883926 = 10/default_pp_txtlbiocrnpyler_883926;
  species protein_RNAse_machinery_atpsyn_txtlbiocrnpyler_339038_1_combined in default_pp_txtlbiocrnpyler_883926 = 10/default_pp_txtlbiocrnpyler_883926;
  species complex_dna_proton_pump_protein_RNAP_machinery_pp_txtlbiocrnpyler_883926 in default_pp_txtlbiocrnpyler_883926 = 0;
  species complex_protein_Ribo_machinery_rna_proton_pump_pp_txtlbiocrnpyler_883926 in default_pp_txtlbiocrnpyler_883926 = 0;
  species complex_protein_RNAse_machinery_rna_proton_pump_pp_txtlbiocrnpyler_883926 in default_pp_txtlbiocrnpyler_883926 = 0;
  species protein_proton_pump_pp_txtlbiocrnpyler_883926_1_combined in default_pp_mibiocrnpyler_252167 = 0;
  species protein_proton_pump_b_pp_mibiocrnpyler_252167 in default_pp_mibiocrnpyler_252167 = 0;
  species proton_outside_H_atpsynthesisbiocrnpyler_295210_1_combined in default_protontransportbiocrnpyler_983878 = 10/default_protontransportbiocrnpyler_983878;
  species proton_inside_H_atpsynthesisbiocrnpyler_295210_1_combined in default_protontransportbiocrnpyler_983878 = 0;
  species metabolite_adp_atpsynthesisbiocrnpyler_295210_1_combined_1_combined in default_protontransportbiocrnpyler_983878 = 0;
  species metabolite_atp_atpsynthesisbiocrnpyler_295210_1_combined_1_combined in default_protontransportbiocrnpyler_983878 = 10/default_protontransportbiocrnpyler_983878;
  species metabolite_pi_atpsynthesisbiocrnpyler_295210_1_combined_1_combined in default_protontransportbiocrnpyler_983878 = 0;

  // Reactions:
  r0_atpsyn_txtlbiocrnpyler_339038: dna_atpsyn_atpsyn_txtlbiocrnpyler_339038 + protein_RNAP_machinery_atpsyn_txtlbiocrnpyler_339038_1_combined => complex_dna_atpsyn_protein_RNAP_machinery_atpsyn_txtlbiocrnpyler_339038; r0_atpsyn_txtlbiocrnpyler_339038_k*dna_atpsyn_atpsyn_txtlbiocrnpyler_339038*protein_RNAP_machinery_atpsyn_txtlbiocrnpyler_339038_1_combined;
    r0_atpsyn_txtlbiocrnpyler_339038_k = 4.385965e-5;
  r1_atpsyn_txtlbiocrnpyler_339038: complex_dna_atpsyn_protein_RNAP_machinery_atpsyn_txtlbiocrnpyler_339038 => rna_atpsyn_atpsyn_txtlbiocrnpyler_339038 + protein_RNAP_machinery_atpsyn_txtlbiocrnpyler_339038_1_combined; r1_atpsyn_txtlbiocrnpyler_339038_k*complex_dna_atpsyn_protein_RNAP_machinery_atpsyn_txtlbiocrnpyler_339038;
    r1_atpsyn_txtlbiocrnpyler_339038_k = 0.05;
  r2_atpsyn_txtlbiocrnpyler_339038: rna_atpsyn_atpsyn_txtlbiocrnpyler_339038 + protein_Ribo_machinery_atpsyn_txtlbiocrnpyler_339038_1_combined => complex_protein_Ribo_machinery_rna_atpsyn_atpsyn_txtlbiocrnpyler_339038; r2_atpsyn_txtlbiocrnpyler_339038_k*rna_atpsyn_atpsyn_txtlbiocrnpyler_339038*protein_Ribo_machinery_atpsyn_txtlbiocrnpyler_339038_1_combined;
    r2_atpsyn_txtlbiocrnpyler_339038_k = 100;
  r3_atpsyn_txtlbiocrnpyler_339038: complex_protein_Ribo_machinery_rna_atpsyn_atpsyn_txtlbiocrnpyler_339038 => rna_atpsyn_atpsyn_txtlbiocrnpyler_339038 + protein_atpsyn_atpsyn_txtlbiocrnpyler_339038_1_combined + protein_Ribo_machinery_atpsyn_txtlbiocrnpyler_339038_1_combined; r3_atpsyn_txtlbiocrnpyler_339038_k*complex_protein_Ribo_machinery_rna_atpsyn_atpsyn_txtlbiocrnpyler_339038;
    r3_atpsyn_txtlbiocrnpyler_339038_k = 0.05;
  r4_atpsyn_txtlbiocrnpyler_339038: rna_atpsyn_atpsyn_txtlbiocrnpyler_339038 + protein_RNAse_machinery_atpsyn_txtlbiocrnpyler_339038_1_combined => complex_protein_RNAse_machinery_rna_atpsyn_atpsyn_txtlbiocrnpyler_339038; r4_atpsyn_txtlbiocrnpyler_339038_k*rna_atpsyn_atpsyn_txtlbiocrnpyler_339038*protein_RNAse_machinery_atpsyn_txtlbiocrnpyler_339038_1_combined;
    r4_atpsyn_txtlbiocrnpyler_339038_k = 100;
  r5_atpsyn_txtlbiocrnpyler_339038: complex_protein_RNAse_machinery_rna_atpsyn_atpsyn_txtlbiocrnpyler_339038 => protein_RNAse_machinery_atpsyn_txtlbiocrnpyler_339038_1_combined; r5_atpsyn_txtlbiocrnpyler_339038_k*complex_protein_RNAse_machinery_rna_atpsyn_atpsyn_txtlbiocrnpyler_339038;
    r5_atpsyn_txtlbiocrnpyler_339038_k = 0.001;
  r0_atpsyn_mibiocrnpyler_658720: protein_atpsyn_atpsyn_txtlbiocrnpyler_339038_1_combined => protein_atpsyn_b_atpsyn_mibiocrnpyler_658720_1_combined; r0_atpsyn_mibiocrnpyler_658720_k*protein_atpsyn_atpsyn_txtlbiocrnpyler_339038_1_combined;
    r0_atpsyn_mibiocrnpyler_658720_k = 0.0003;
  r0_atpsynthesisbiocrnpyler_295210: 4 proton_outside_H_atpsynthesisbiocrnpyler_295210_1_combined + metabolite_adp_atpsynthesisbiocrnpyler_295210_1_combined_1_combined + metabolite_pi_atpsynthesisbiocrnpyler_295210_1_combined_1_combined + protein_atpsyn_b_atpsyn_mibiocrnpyler_658720_1_combined => 4 proton_inside_H_atpsynthesisbiocrnpyler_295210_1_combined + metabolite_atp_atpsynthesisbiocrnpyler_295210_1_combined_1_combined + protein_atpsyn_b_atpsyn_mibiocrnpyler_658720_1_combined; r0_atpsynthesisbiocrnpyler_295210_k*proton_outside_H_atpsynthesisbiocrnpyler_295210_1_combined^4*metabolite_adp_atpsynthesisbiocrnpyler_295210_1_combined_1_combined*metabolite_pi_atpsynthesisbiocrnpyler_295210_1_combined_1_combined*protein_atpsyn_b_atpsyn_mibiocrnpyler_658720_1_combined;
    r0_atpsynthesisbiocrnpyler_295210_k = 100;
  r0_atp_usebiocrnpyler_617483: metabolite_atp_atpsynthesisbiocrnpyler_295210_1_combined_1_combined => metabolite_adp_atpsynthesisbiocrnpyler_295210_1_combined_1_combined + metabolite_pi_atpsynthesisbiocrnpyler_295210_1_combined_1_combined; r0_atp_usebiocrnpyler_617483_k*metabolite_atp_atpsynthesisbiocrnpyler_295210_1_combined_1_combined;
    r0_atp_usebiocrnpyler_617483_k = 5;
  r0_pp_txtlbiocrnpyler_883926: dna_proton_pump_pp_txtlbiocrnpyler_883926 + protein_RNAP_machinery_atpsyn_txtlbiocrnpyler_339038_1_combined => complex_dna_proton_pump_protein_RNAP_machinery_pp_txtlbiocrnpyler_883926; r0_pp_txtlbiocrnpyler_883926_k*dna_proton_pump_pp_txtlbiocrnpyler_883926*protein_RNAP_machinery_atpsyn_txtlbiocrnpyler_339038_1_combined;
    r0_pp_txtlbiocrnpyler_883926_k = 4.385965e-5;
  r1_pp_txtlbiocrnpyler_883926: complex_dna_proton_pump_protein_RNAP_machinery_pp_txtlbiocrnpyler_883926 => rna_proton_pump_pp_txtlbiocrnpyler_883926 + protein_RNAP_machinery_atpsyn_txtlbiocrnpyler_339038_1_combined; r1_pp_txtlbiocrnpyler_883926_k*complex_dna_proton_pump_protein_RNAP_machinery_pp_txtlbiocrnpyler_883926;
    r1_pp_txtlbiocrnpyler_883926_k = 0.05;
  r2_pp_txtlbiocrnpyler_883926: rna_proton_pump_pp_txtlbiocrnpyler_883926 + protein_Ribo_machinery_atpsyn_txtlbiocrnpyler_339038_1_combined => complex_protein_Ribo_machinery_rna_proton_pump_pp_txtlbiocrnpyler_883926; r2_pp_txtlbiocrnpyler_883926_k*rna_proton_pump_pp_txtlbiocrnpyler_883926*protein_Ribo_machinery_atpsyn_txtlbiocrnpyler_339038_1_combined;
    r2_pp_txtlbiocrnpyler_883926_k = 100;
  r3_pp_txtlbiocrnpyler_883926: complex_protein_Ribo_machinery_rna_proton_pump_pp_txtlbiocrnpyler_883926 => rna_proton_pump_pp_txtlbiocrnpyler_883926 + protein_proton_pump_pp_txtlbiocrnpyler_883926_1_combined + protein_Ribo_machinery_atpsyn_txtlbiocrnpyler_339038_1_combined; r3_pp_txtlbiocrnpyler_883926_k*complex_protein_Ribo_machinery_rna_proton_pump_pp_txtlbiocrnpyler_883926;
    r3_pp_txtlbiocrnpyler_883926_k = 0.05;
  r4_pp_txtlbiocrnpyler_883926: rna_proton_pump_pp_txtlbiocrnpyler_883926 + protein_RNAse_machinery_atpsyn_txtlbiocrnpyler_339038_1_combined => complex_protein_RNAse_machinery_rna_proton_pump_pp_txtlbiocrnpyler_883926; r4_pp_txtlbiocrnpyler_883926_k*rna_proton_pump_pp_txtlbiocrnpyler_883926*protein_RNAse_machinery_atpsyn_txtlbiocrnpyler_339038_1_combined;
    r4_pp_txtlbiocrnpyler_883926_k = 100;
  r5_pp_txtlbiocrnpyler_883926: complex_protein_RNAse_machinery_rna_proton_pump_pp_txtlbiocrnpyler_883926 => protein_RNAse_machinery_atpsyn_txtlbiocrnpyler_339038_1_combined; r5_pp_txtlbiocrnpyler_883926_k*complex_protein_RNAse_machinery_rna_proton_pump_pp_txtlbiocrnpyler_883926;
    r5_pp_txtlbiocrnpyler_883926_k = 0.001;
  r0_pp_mibiocrnpyler_252167: protein_proton_pump_pp_txtlbiocrnpyler_883926_1_combined => protein_proton_pump_b_pp_mibiocrnpyler_252167; r0_pp_mibiocrnpyler_252167_k*protein_proton_pump_pp_txtlbiocrnpyler_883926_1_combined;
    r0_pp_mibiocrnpyler_252167_k = 0.0003;
  r0_protontransportbiocrnpyler_983878: 4 proton_inside_H_atpsynthesisbiocrnpyler_295210_1_combined => 4 proton_outside_H_atpsynthesisbiocrnpyler_295210_1_combined; r0_protontransportbiocrnpyler_983878_k*proton_inside_H_atpsynthesisbiocrnpyler_295210_1_combined^4;
    r0_protontransportbiocrnpyler_983878_k = 100;

  // Unit definitions:
  unit square_metre = metre^2;
end
