// SBML level 3 version 2

model combined_model_of__combined_model_of__external_reservoir_model_combined_model_of__atc_membrane_dnaexp_membrane_combined_model_of__combined_model_of__biocrnpyler_715245_biocrnpyler_610971()
  // model units - substance: mole, time: second, volume: litre, area: square_metre, length: metre, extent: mole

  // Compartments:
  compartment cell_1_internal_combined = 3e-6 litre;
  compartment cell_1_external_combined_1 = 0.0001 litre;

  // Species:
  species atc_e_external_reservoir_model_1_combined in cell_1_external_combined_1 = 10000/cell_1_external_combined_1;
  species ssDNA_e in cell_1_external_combined_1 = 0;
  species ssDNA in cell_1_internal_combined = 50/cell_1_internal_combined;
  species VirE2_b_ssDNA in cell_1_internal_combined = 0;
  species dna_g_virE2biocrnpyler_715245_combined_model_of__biocrnpyler_715245_biocrnpyler_610971 in cell_1_internal_combined = 1/cell_1_internal_combined;
  species tetR_virE2biocrnpyler_715245_combined_model_of__biocrnpyler_715245_biocrnpyler_610971 in cell_1_internal_combined = 10/cell_1_internal_combined;
  species rna_g_virE2biocrnpyler_715245_combined_model_of__biocrnpyler_715245_biocrnpyler_610971 in cell_1_internal_combined = 0;
  species VirE2_f_virE2biocrnpyler_715245_combined_model_of__biocrnpyler_715245_biocrnpyler_610971 in cell_1_internal_combined = 0;
  species ADP_virE2biocrnpyler_715245_combined_model_of__biocrnpyler_715245_biocrnpyler_610971 in cell_1_internal_combined = 0;
  species atc_i_1_combined in cell_1_internal_combined = 0;
  species complex_atc_i_tetR_virE2biocrnpyler_715245_combined_model_of__biocrnpyler_715245_biocrnpyler_610971 in cell_1_internal_combined = 0;
  species VirE2_b_1_combined in cell_1_internal_combined = 0;
  species complex_dna_g_tetR_virE2biocrnpyler_715245_combined_model_of__biocrnpyler_715245_biocrnpyler_610971 in cell_1_internal_combined = 0;
  species complex_atc_i_dna_g_tetR_virE2biocrnpyler_715245_combined_model_of__biocrnpyler_715245_biocrnpyler_610971 in cell_1_internal_combined = 0;
  species rna_atpsyn_atp_synthasebiocrnpyler_610971_combined_model_of__biocrnpyler_715245_biocrnpyler_610971 in cell_1_internal_combined = 0;
  species dna_atpsyn_atp_synthasebiocrnpyler_610971_combined_model_of__biocrnpyler_715245_biocrnpyler_610971 in cell_1_internal_combined = 10/cell_1_internal_combined;
  species protein_atpsyn_atp_synthasebiocrnpyler_610971_combined_model_of__biocrnpyler_715245_biocrnpyler_610971 in cell_1_internal_combined = 0;
  species protein_RNAP_machinery_atp_synthasebiocrnpyler_610971_combined_model_of__biocrnpyler_715245_biocrnpyler_610971 in cell_1_internal_combined = 10/cell_1_internal_combined;
  species protein_Ribo_machinery_atp_synthasebiocrnpyler_610971_combined_model_of__biocrnpyler_715245_biocrnpyler_610971 in cell_1_internal_combined = 10/cell_1_internal_combined;
  species protein_RNAse_machinery_atp_synthasebiocrnpyler_610971_combined_model_of__biocrnpyler_715245_biocrnpyler_610971 in cell_1_internal_combined = 10/cell_1_internal_combined;
  species complex_dna_atpsyn_protein_RNAP_machinery_atp_synthasebiocrnpyler_610971_combined_model_of__biocrnpyler_715245_biocrnpyler_610971 in cell_1_internal_combined = 0;
  species complex_protein_Ribo_machinery_rna_atpsyn_atp_synthasebiocrnpyler_610971_combined_model_of__biocrnpyler_715245_biocrnpyler_610971 in cell_1_internal_combined = 0;
  species complex_protein_RNAse_machinery_rna_atpsyn_atp_synthasebiocrnpyler_610971_combined_model_of__biocrnpyler_715245_biocrnpyler_610971 in cell_1_internal_combined = 0;
  species protein_atpsyn_b_atp_synthasebiocrnpyler_610971_combined_model_of__biocrnpyler_715245_biocrnpyler_610971 in cell_1_internal_combined = 0;
  species proton_outside_H_atp_synthasebiocrnpyler_610971_combined_model_of__biocrnpyler_715245_biocrnpyler_610971 in cell_1_internal_combined = 10/cell_1_internal_combined;
  species proton_inside_H_atp_synthasebiocrnpyler_610971_combined_model_of__biocrnpyler_715245_biocrnpyler_610971 in cell_1_internal_combined = 0;
  species metabolite_adp_atp_synthasebiocrnpyler_610971_combined_model_of__biocrnpyler_715245_biocrnpyler_610971 in cell_1_internal_combined = 0;
  species ATP_virE2biocrnpyler_715245_1_combined_combined_model_of__biocrnpyler_715245_biocrnpyler_610971 in cell_1_internal_combined = 10/cell_1_internal_combined; ATP_virE2biocrnpyler_715245_1_combined_combined_model_of__biocrnpyler_715245_biocrnpyler_610971 is "metabolite_atp";
  species P_virE2biocrnpyler_715245_1_combined_combined_model_of__biocrnpyler_715245_biocrnpyler_610971 in cell_1_internal_combined = 30/cell_1_internal_combined; P_virE2biocrnpyler_715245_1_combined_combined_model_of__biocrnpyler_715245_biocrnpyler_610971 is "metabolite_pi";
  species rna_proton_pump_atp_synthasebiocrnpyler_610971_combined_model_of__biocrnpyler_715245_biocrnpyler_610971 in cell_1_internal_combined = 0;
  species dna_proton_pump_atp_synthasebiocrnpyler_610971_combined_model_of__biocrnpyler_715245_biocrnpyler_610971 in cell_1_internal_combined = 10/cell_1_internal_combined;
  species protein_proton_pump_atp_synthasebiocrnpyler_610971_combined_model_of__biocrnpyler_715245_biocrnpyler_610971 in cell_1_internal_combined = 0;
  species protein_proton_pump_b_atp_synthasebiocrnpyler_610971_combined_model_of__biocrnpyler_715245_biocrnpyler_610971 in cell_1_internal_combined = 0;
  species complex_dna_proton_pump_protein_RNAP_machinery_atp_synthasebiocrnpyler_610971_combined_model_of__biocrnpyler_715245_biocrnpyler_610971 in cell_1_internal_combined = 0;
  species complex_protein_Ribo_machinery_rna_proton_pump_atp_synthasebiocrnpyler_610971_combined_model_of__biocrnpyler_715245_biocrnpyler_610971 in cell_1_internal_combined = 0;
  species complex_protein_RNAse_machinery_rna_proton_pump_atp_synthasebiocrnpyler_610971_combined_model_of__biocrnpyler_715245_biocrnpyler_610971 in cell_1_internal_combined = 0;

  // Parameters:
  kb = 0.002 per_second;
  kd = 1e-5 per_second;
  kb1 = 0.002 per_second;
  kd1 = 1e-5 per_second;
  kd2 = 0.0002 per_second;

  // Reactions:
  r1: atc_e_external_reservoir_model_1_combined -> atc_i_1_combined; kb*atc_e_external_reservoir_model_1_combined - kd*atc_i_1_combined;
  R1: VirE2_b_1_combined + ssDNA -> VirE2_b_ssDNA; kb1*VirE2_b_1_combined*ssDNA - kd1*VirE2_b_ssDNA;
  R2: VirE2_b_ssDNA => ssDNA_e + VirE2_b_1_combined; kd2*VirE2_b_ssDNA;
  r0_virE2biocrnpyler_715245_combined_model_of__biocrnpyler_715245_biocrnpyler_610971: atc_i_1_combined + tetR_virE2biocrnpyler_715245_combined_model_of__biocrnpyler_715245_biocrnpyler_610971 => complex_atc_i_tetR_virE2biocrnpyler_715245_combined_model_of__biocrnpyler_715245_biocrnpyler_610971; r0_virE2biocrnpyler_715245_combined_model_of__biocrnpyler_715245_biocrnpyler_610971_k*atc_i_1_combined*tetR_virE2biocrnpyler_715245_combined_model_of__biocrnpyler_715245_biocrnpyler_610971;
    r0_virE2biocrnpyler_715245_combined_model_of__biocrnpyler_715245_biocrnpyler_610971_k = 0.0002;
  r0_1_virE2biocrnpyler_715245_combined_model_of__biocrnpyler_715245_biocrnpyler_610971: complex_atc_i_tetR_virE2biocrnpyler_715245_combined_model_of__biocrnpyler_715245_biocrnpyler_610971 => atc_i_1_combined + tetR_virE2biocrnpyler_715245_combined_model_of__biocrnpyler_715245_biocrnpyler_610971; r0_1_virE2biocrnpyler_715245_combined_model_of__biocrnpyler_715245_biocrnpyler_610971_k*complex_atc_i_tetR_virE2biocrnpyler_715245_combined_model_of__biocrnpyler_715245_biocrnpyler_610971;
    r0_1_virE2biocrnpyler_715245_combined_model_of__biocrnpyler_715245_biocrnpyler_610971_k = 2e-9;
  r2_virE2biocrnpyler_715245_combined_model_of__biocrnpyler_715245_biocrnpyler_610971: dna_g_virE2biocrnpyler_715245_combined_model_of__biocrnpyler_715245_biocrnpyler_610971 + tetR_virE2biocrnpyler_715245_combined_model_of__biocrnpyler_715245_biocrnpyler_610971 => complex_dna_g_tetR_virE2biocrnpyler_715245_combined_model_of__biocrnpyler_715245_biocrnpyler_610971; r2_virE2biocrnpyler_715245_combined_model_of__biocrnpyler_715245_biocrnpyler_610971_k*dna_g_virE2biocrnpyler_715245_combined_model_of__biocrnpyler_715245_biocrnpyler_610971*tetR_virE2biocrnpyler_715245_combined_model_of__biocrnpyler_715245_biocrnpyler_610971;
    r2_virE2biocrnpyler_715245_combined_model_of__biocrnpyler_715245_biocrnpyler_610971_k = 4e-5;
  r2_1_virE2biocrnpyler_715245_combined_model_of__biocrnpyler_715245_biocrnpyler_610971: complex_dna_g_tetR_virE2biocrnpyler_715245_combined_model_of__biocrnpyler_715245_biocrnpyler_610971 => dna_g_virE2biocrnpyler_715245_combined_model_of__biocrnpyler_715245_biocrnpyler_610971 + tetR_virE2biocrnpyler_715245_combined_model_of__biocrnpyler_715245_biocrnpyler_610971; r2_1_virE2biocrnpyler_715245_combined_model_of__biocrnpyler_715245_biocrnpyler_610971_k*complex_dna_g_tetR_virE2biocrnpyler_715245_combined_model_of__biocrnpyler_715245_biocrnpyler_610971;
    r2_1_virE2biocrnpyler_715245_combined_model_of__biocrnpyler_715245_biocrnpyler_610971_k = 1e-12;
  r4_virE2biocrnpyler_715245_combined_model_of__biocrnpyler_715245_biocrnpyler_610971: complex_dna_g_tetR_virE2biocrnpyler_715245_combined_model_of__biocrnpyler_715245_biocrnpyler_610971 + atc_i_1_combined => complex_atc_i_dna_g_tetR_virE2biocrnpyler_715245_combined_model_of__biocrnpyler_715245_biocrnpyler_610971; r4_virE2biocrnpyler_715245_combined_model_of__biocrnpyler_715245_biocrnpyler_610971_k*complex_dna_g_tetR_virE2biocrnpyler_715245_combined_model_of__biocrnpyler_715245_biocrnpyler_610971*atc_i_1_combined;
    r4_virE2biocrnpyler_715245_combined_model_of__biocrnpyler_715245_biocrnpyler_610971_k = 6e-6;
  r4_1_virE2biocrnpyler_715245_combined_model_of__biocrnpyler_715245_biocrnpyler_610971: complex_atc_i_dna_g_tetR_virE2biocrnpyler_715245_combined_model_of__biocrnpyler_715245_biocrnpyler_610971 => complex_dna_g_tetR_virE2biocrnpyler_715245_combined_model_of__biocrnpyler_715245_biocrnpyler_610971 + atc_i_1_combined; r4_1_virE2biocrnpyler_715245_combined_model_of__biocrnpyler_715245_biocrnpyler_610971_k*complex_atc_i_dna_g_tetR_virE2biocrnpyler_715245_combined_model_of__biocrnpyler_715245_biocrnpyler_610971;
    r4_1_virE2biocrnpyler_715245_combined_model_of__biocrnpyler_715245_biocrnpyler_610971_k = 3e-9;
  r6_virE2biocrnpyler_715245_combined_model_of__biocrnpyler_715245_biocrnpyler_610971: complex_atc_i_dna_g_tetR_virE2biocrnpyler_715245_combined_model_of__biocrnpyler_715245_biocrnpyler_610971 => dna_g_virE2biocrnpyler_715245_combined_model_of__biocrnpyler_715245_biocrnpyler_610971 + complex_atc_i_tetR_virE2biocrnpyler_715245_combined_model_of__biocrnpyler_715245_biocrnpyler_610971; r6_virE2biocrnpyler_715245_combined_model_of__biocrnpyler_715245_biocrnpyler_610971_k*complex_atc_i_dna_g_tetR_virE2biocrnpyler_715245_combined_model_of__biocrnpyler_715245_biocrnpyler_610971;
    r6_virE2biocrnpyler_715245_combined_model_of__biocrnpyler_715245_biocrnpyler_610971_k = 0.005;
  r6_1_virE2biocrnpyler_715245_combined_model_of__biocrnpyler_715245_biocrnpyler_610971: dna_g_virE2biocrnpyler_715245_combined_model_of__biocrnpyler_715245_biocrnpyler_610971 + complex_atc_i_tetR_virE2biocrnpyler_715245_combined_model_of__biocrnpyler_715245_biocrnpyler_610971 => complex_atc_i_dna_g_tetR_virE2biocrnpyler_715245_combined_model_of__biocrnpyler_715245_biocrnpyler_610971; r6_1_virE2biocrnpyler_715245_combined_model_of__biocrnpyler_715245_biocrnpyler_610971_k*dna_g_virE2biocrnpyler_715245_combined_model_of__biocrnpyler_715245_biocrnpyler_610971*complex_atc_i_tetR_virE2biocrnpyler_715245_combined_model_of__biocrnpyler_715245_biocrnpyler_610971;
    r6_1_virE2biocrnpyler_715245_combined_model_of__biocrnpyler_715245_biocrnpyler_610971_k = 1e-10;
  r8_virE2biocrnpyler_715245_combined_model_of__biocrnpyler_715245_biocrnpyler_610971: dna_g_virE2biocrnpyler_715245_combined_model_of__biocrnpyler_715245_biocrnpyler_610971 => dna_g_virE2biocrnpyler_715245_combined_model_of__biocrnpyler_715245_biocrnpyler_610971 + rna_g_virE2biocrnpyler_715245_combined_model_of__biocrnpyler_715245_biocrnpyler_610971; r8_virE2biocrnpyler_715245_combined_model_of__biocrnpyler_715245_biocrnpyler_610971_k*dna_g_virE2biocrnpyler_715245_combined_model_of__biocrnpyler_715245_biocrnpyler_610971;
    r8_virE2biocrnpyler_715245_combined_model_of__biocrnpyler_715245_biocrnpyler_610971_k = 0.0031875;
  r9_virE2biocrnpyler_715245_combined_model_of__biocrnpyler_715245_biocrnpyler_610971: rna_g_virE2biocrnpyler_715245_combined_model_of__biocrnpyler_715245_biocrnpyler_610971 + ATP_virE2biocrnpyler_715245_1_combined_combined_model_of__biocrnpyler_715245_biocrnpyler_610971 => rna_g_virE2biocrnpyler_715245_combined_model_of__biocrnpyler_715245_biocrnpyler_610971 + ADP_virE2biocrnpyler_715245_combined_model_of__biocrnpyler_715245_biocrnpyler_610971 + VirE2_f_virE2biocrnpyler_715245_combined_model_of__biocrnpyler_715245_biocrnpyler_610971 + P_virE2biocrnpyler_715245_1_combined_combined_model_of__biocrnpyler_715245_biocrnpyler_610971; r9_virE2biocrnpyler_715245_combined_model_of__biocrnpyler_715245_biocrnpyler_610971_k*rna_g_virE2biocrnpyler_715245_combined_model_of__biocrnpyler_715245_biocrnpyler_610971*ATP_virE2biocrnpyler_715245_1_combined_combined_model_of__biocrnpyler_715245_biocrnpyler_610971^r9_virE2biocrnpyler_715245_combined_model_of__biocrnpyler_715245_biocrnpyler_610971_n/(ATP_virE2biocrnpyler_715245_1_combined_combined_model_of__biocrnpyler_715245_biocrnpyler_610971^r9_virE2biocrnpyler_715245_combined_model_of__biocrnpyler_715245_biocrnpyler_610971_n + r9_virE2biocrnpyler_715245_combined_model_of__biocrnpyler_715245_biocrnpyler_610971_K);
    r9_virE2biocrnpyler_715245_combined_model_of__biocrnpyler_715245_biocrnpyler_610971_k = 0.001; r9_virE2biocrnpyler_715245_combined_model_of__biocrnpyler_715245_biocrnpyler_610971_n = 1; r9_virE2biocrnpyler_715245_combined_model_of__biocrnpyler_715245_biocrnpyler_610971_K = 1;
  r10_virE2biocrnpyler_715245_combined_model_of__biocrnpyler_715245_biocrnpyler_610971: VirE2_f_virE2biocrnpyler_715245_combined_model_of__biocrnpyler_715245_biocrnpyler_610971 => VirE2_b_1_combined; r10_virE2biocrnpyler_715245_combined_model_of__biocrnpyler_715245_biocrnpyler_610971_k*VirE2_f_virE2biocrnpyler_715245_combined_model_of__biocrnpyler_715245_biocrnpyler_610971/(VirE2_b_1_combined^r10_virE2biocrnpyler_715245_combined_model_of__biocrnpyler_715245_biocrnpyler_610971_n + r10_virE2biocrnpyler_715245_combined_model_of__biocrnpyler_715245_biocrnpyler_610971_K);
    r10_virE2biocrnpyler_715245_combined_model_of__biocrnpyler_715245_biocrnpyler_610971_k = 0.0005; r10_virE2biocrnpyler_715245_combined_model_of__biocrnpyler_715245_biocrnpyler_610971_n = 1; r10_virE2biocrnpyler_715245_combined_model_of__biocrnpyler_715245_biocrnpyler_610971_K = 1;
  r11_virE2biocrnpyler_715245_combined_model_of__biocrnpyler_715245_biocrnpyler_610971: rna_g_virE2biocrnpyler_715245_combined_model_of__biocrnpyler_715245_biocrnpyler_610971 => ; r11_virE2biocrnpyler_715245_combined_model_of__biocrnpyler_715245_biocrnpyler_610971_k*rna_g_virE2biocrnpyler_715245_combined_model_of__biocrnpyler_715245_biocrnpyler_610971;
    r11_virE2biocrnpyler_715245_combined_model_of__biocrnpyler_715245_biocrnpyler_610971_k = 0.001;
  r12_virE2biocrnpyler_715245_combined_model_of__biocrnpyler_715245_biocrnpyler_610971: VirE2_f_virE2biocrnpyler_715245_combined_model_of__biocrnpyler_715245_biocrnpyler_610971 => ; r12_virE2biocrnpyler_715245_combined_model_of__biocrnpyler_715245_biocrnpyler_610971_k*VirE2_f_virE2biocrnpyler_715245_combined_model_of__biocrnpyler_715245_biocrnpyler_610971;
    r12_virE2biocrnpyler_715245_combined_model_of__biocrnpyler_715245_biocrnpyler_610971_k = 1e-5;
  r0_atp_synthasebiocrnpyler_610971_combined_model_of__biocrnpyler_715245_biocrnpyler_610971: dna_atpsyn_atp_synthasebiocrnpyler_610971_combined_model_of__biocrnpyler_715245_biocrnpyler_610971 + protein_RNAP_machinery_atp_synthasebiocrnpyler_610971_combined_model_of__biocrnpyler_715245_biocrnpyler_610971 => complex_dna_atpsyn_protein_RNAP_machinery_atp_synthasebiocrnpyler_610971_combined_model_of__biocrnpyler_715245_biocrnpyler_610971; r0_atp_synthasebiocrnpyler_610971_combined_model_of__biocrnpyler_715245_biocrnpyler_610971_k*dna_atpsyn_atp_synthasebiocrnpyler_610971_combined_model_of__biocrnpyler_715245_biocrnpyler_610971*protein_RNAP_machinery_atp_synthasebiocrnpyler_610971_combined_model_of__biocrnpyler_715245_biocrnpyler_610971;
    r0_atp_synthasebiocrnpyler_610971_combined_model_of__biocrnpyler_715245_biocrnpyler_610971_k = 100;
  r1_atp_synthasebiocrnpyler_610971_combined_model_of__biocrnpyler_715245_biocrnpyler_610971: complex_dna_atpsyn_protein_RNAP_machinery_atp_synthasebiocrnpyler_610971_combined_model_of__biocrnpyler_715245_biocrnpyler_610971 => rna_atpsyn_atp_synthasebiocrnpyler_610971_combined_model_of__biocrnpyler_715245_biocrnpyler_610971 + protein_RNAP_machinery_atp_synthasebiocrnpyler_610971_combined_model_of__biocrnpyler_715245_biocrnpyler_610971; r1_atp_synthasebiocrnpyler_610971_combined_model_of__biocrnpyler_715245_biocrnpyler_610971_k*complex_dna_atpsyn_protein_RNAP_machinery_atp_synthasebiocrnpyler_610971_combined_model_of__biocrnpyler_715245_biocrnpyler_610971;
    r1_atp_synthasebiocrnpyler_610971_combined_model_of__biocrnpyler_715245_biocrnpyler_610971_k = 0.05;
  r2_atp_synthasebiocrnpyler_610971_combined_model_of__biocrnpyler_715245_biocrnpyler_610971: rna_atpsyn_atp_synthasebiocrnpyler_610971_combined_model_of__biocrnpyler_715245_biocrnpyler_610971 + protein_Ribo_machinery_atp_synthasebiocrnpyler_610971_combined_model_of__biocrnpyler_715245_biocrnpyler_610971 => complex_protein_Ribo_machinery_rna_atpsyn_atp_synthasebiocrnpyler_610971_combined_model_of__biocrnpyler_715245_biocrnpyler_610971; r2_atp_synthasebiocrnpyler_610971_combined_model_of__biocrnpyler_715245_biocrnpyler_610971_k*rna_atpsyn_atp_synthasebiocrnpyler_610971_combined_model_of__biocrnpyler_715245_biocrnpyler_610971*protein_Ribo_machinery_atp_synthasebiocrnpyler_610971_combined_model_of__biocrnpyler_715245_biocrnpyler_610971;
    r2_atp_synthasebiocrnpyler_610971_combined_model_of__biocrnpyler_715245_biocrnpyler_610971_k = 100;
  r3_atp_synthasebiocrnpyler_610971_combined_model_of__biocrnpyler_715245_biocrnpyler_610971: complex_protein_Ribo_machinery_rna_atpsyn_atp_synthasebiocrnpyler_610971_combined_model_of__biocrnpyler_715245_biocrnpyler_610971 => rna_atpsyn_atp_synthasebiocrnpyler_610971_combined_model_of__biocrnpyler_715245_biocrnpyler_610971 + protein_atpsyn_atp_synthasebiocrnpyler_610971_combined_model_of__biocrnpyler_715245_biocrnpyler_610971 + protein_Ribo_machinery_atp_synthasebiocrnpyler_610971_combined_model_of__biocrnpyler_715245_biocrnpyler_610971; r3_atp_synthasebiocrnpyler_610971_combined_model_of__biocrnpyler_715245_biocrnpyler_610971_k*complex_protein_Ribo_machinery_rna_atpsyn_atp_synthasebiocrnpyler_610971_combined_model_of__biocrnpyler_715245_biocrnpyler_610971;
    r3_atp_synthasebiocrnpyler_610971_combined_model_of__biocrnpyler_715245_biocrnpyler_610971_k = 0.05;
  r4_atp_synthasebiocrnpyler_610971_combined_model_of__biocrnpyler_715245_biocrnpyler_610971: rna_atpsyn_atp_synthasebiocrnpyler_610971_combined_model_of__biocrnpyler_715245_biocrnpyler_610971 + protein_RNAse_machinery_atp_synthasebiocrnpyler_610971_combined_model_of__biocrnpyler_715245_biocrnpyler_610971 => complex_protein_RNAse_machinery_rna_atpsyn_atp_synthasebiocrnpyler_610971_combined_model_of__biocrnpyler_715245_biocrnpyler_610971; r4_atp_synthasebiocrnpyler_610971_combined_model_of__biocrnpyler_715245_biocrnpyler_610971_k*rna_atpsyn_atp_synthasebiocrnpyler_610971_combined_model_of__biocrnpyler_715245_biocrnpyler_610971*protein_RNAse_machinery_atp_synthasebiocrnpyler_610971_combined_model_of__biocrnpyler_715245_biocrnpyler_610971;
    r4_atp_synthasebiocrnpyler_610971_combined_model_of__biocrnpyler_715245_biocrnpyler_610971_k = 100;
  r5_atp_synthasebiocrnpyler_610971_combined_model_of__biocrnpyler_715245_biocrnpyler_610971: complex_protein_RNAse_machinery_rna_atpsyn_atp_synthasebiocrnpyler_610971_combined_model_of__biocrnpyler_715245_biocrnpyler_610971 => protein_RNAse_machinery_atp_synthasebiocrnpyler_610971_combined_model_of__biocrnpyler_715245_biocrnpyler_610971; r5_atp_synthasebiocrnpyler_610971_combined_model_of__biocrnpyler_715245_biocrnpyler_610971_k*complex_protein_RNAse_machinery_rna_atpsyn_atp_synthasebiocrnpyler_610971_combined_model_of__biocrnpyler_715245_biocrnpyler_610971;
    r5_atp_synthasebiocrnpyler_610971_combined_model_of__biocrnpyler_715245_biocrnpyler_610971_k = 0.001;
  r6_atp_synthasebiocrnpyler_610971_combined_model_of__biocrnpyler_715245_biocrnpyler_610971: protein_atpsyn_atp_synthasebiocrnpyler_610971_combined_model_of__biocrnpyler_715245_biocrnpyler_610971 => protein_atpsyn_b_atp_synthasebiocrnpyler_610971_combined_model_of__biocrnpyler_715245_biocrnpyler_610971; r6_atp_synthasebiocrnpyler_610971_combined_model_of__biocrnpyler_715245_biocrnpyler_610971_k*protein_atpsyn_atp_synthasebiocrnpyler_610971_combined_model_of__biocrnpyler_715245_biocrnpyler_610971;
    r6_atp_synthasebiocrnpyler_610971_combined_model_of__biocrnpyler_715245_biocrnpyler_610971_k = 0.0003;
  r7_atp_synthasebiocrnpyler_610971_combined_model_of__biocrnpyler_715245_biocrnpyler_610971: 4 proton_outside_H_atp_synthasebiocrnpyler_610971_combined_model_of__biocrnpyler_715245_biocrnpyler_610971 + metabolite_adp_atp_synthasebiocrnpyler_610971_combined_model_of__biocrnpyler_715245_biocrnpyler_610971 + P_virE2biocrnpyler_715245_1_combined_combined_model_of__biocrnpyler_715245_biocrnpyler_610971 + protein_atpsyn_b_atp_synthasebiocrnpyler_610971_combined_model_of__biocrnpyler_715245_biocrnpyler_610971 => 4 proton_inside_H_atp_synthasebiocrnpyler_610971_combined_model_of__biocrnpyler_715245_biocrnpyler_610971 + ATP_virE2biocrnpyler_715245_1_combined_combined_model_of__biocrnpyler_715245_biocrnpyler_610971 + protein_atpsyn_b_atp_synthasebiocrnpyler_610971_combined_model_of__biocrnpyler_715245_biocrnpyler_610971; r7_atp_synthasebiocrnpyler_610971_combined_model_of__biocrnpyler_715245_biocrnpyler_610971_k*proton_outside_H_atp_synthasebiocrnpyler_610971_combined_model_of__biocrnpyler_715245_biocrnpyler_610971^4*metabolite_adp_atp_synthasebiocrnpyler_610971_combined_model_of__biocrnpyler_715245_biocrnpyler_610971*P_virE2biocrnpyler_715245_1_combined_combined_model_of__biocrnpyler_715245_biocrnpyler_610971*protein_atpsyn_b_atp_synthasebiocrnpyler_610971_combined_model_of__biocrnpyler_715245_biocrnpyler_610971;
    r7_atp_synthasebiocrnpyler_610971_combined_model_of__biocrnpyler_715245_biocrnpyler_610971_k = 100;
  r8_atp_synthasebiocrnpyler_610971_combined_model_of__biocrnpyler_715245_biocrnpyler_610971: dna_proton_pump_atp_synthasebiocrnpyler_610971_combined_model_of__biocrnpyler_715245_biocrnpyler_610971 + protein_RNAP_machinery_atp_synthasebiocrnpyler_610971_combined_model_of__biocrnpyler_715245_biocrnpyler_610971 => complex_dna_proton_pump_protein_RNAP_machinery_atp_synthasebiocrnpyler_610971_combined_model_of__biocrnpyler_715245_biocrnpyler_610971; r8_atp_synthasebiocrnpyler_610971_combined_model_of__biocrnpyler_715245_biocrnpyler_610971_k*dna_proton_pump_atp_synthasebiocrnpyler_610971_combined_model_of__biocrnpyler_715245_biocrnpyler_610971*protein_RNAP_machinery_atp_synthasebiocrnpyler_610971_combined_model_of__biocrnpyler_715245_biocrnpyler_610971;
    r8_atp_synthasebiocrnpyler_610971_combined_model_of__biocrnpyler_715245_biocrnpyler_610971_k = 100;
  r9_atp_synthasebiocrnpyler_610971_combined_model_of__biocrnpyler_715245_biocrnpyler_610971: complex_dna_proton_pump_protein_RNAP_machinery_atp_synthasebiocrnpyler_610971_combined_model_of__biocrnpyler_715245_biocrnpyler_610971 => rna_proton_pump_atp_synthasebiocrnpyler_610971_combined_model_of__biocrnpyler_715245_biocrnpyler_610971 + protein_RNAP_machinery_atp_synthasebiocrnpyler_610971_combined_model_of__biocrnpyler_715245_biocrnpyler_610971; r9_atp_synthasebiocrnpyler_610971_combined_model_of__biocrnpyler_715245_biocrnpyler_610971_k*complex_dna_proton_pump_protein_RNAP_machinery_atp_synthasebiocrnpyler_610971_combined_model_of__biocrnpyler_715245_biocrnpyler_610971;
    r9_atp_synthasebiocrnpyler_610971_combined_model_of__biocrnpyler_715245_biocrnpyler_610971_k = 0.05;
  r10_atp_synthasebiocrnpyler_610971_combined_model_of__biocrnpyler_715245_biocrnpyler_610971: rna_proton_pump_atp_synthasebiocrnpyler_610971_combined_model_of__biocrnpyler_715245_biocrnpyler_610971 + protein_Ribo_machinery_atp_synthasebiocrnpyler_610971_combined_model_of__biocrnpyler_715245_biocrnpyler_610971 => complex_protein_Ribo_machinery_rna_proton_pump_atp_synthasebiocrnpyler_610971_combined_model_of__biocrnpyler_715245_biocrnpyler_610971; r10_atp_synthasebiocrnpyler_610971_combined_model_of__biocrnpyler_715245_biocrnpyler_610971_k*rna_proton_pump_atp_synthasebiocrnpyler_610971_combined_model_of__biocrnpyler_715245_biocrnpyler_610971*protein_Ribo_machinery_atp_synthasebiocrnpyler_610971_combined_model_of__biocrnpyler_715245_biocrnpyler_610971;
    r10_atp_synthasebiocrnpyler_610971_combined_model_of__biocrnpyler_715245_biocrnpyler_610971_k = 100;
  r11_atp_synthasebiocrnpyler_610971_combined_model_of__biocrnpyler_715245_biocrnpyler_610971: complex_protein_Ribo_machinery_rna_proton_pump_atp_synthasebiocrnpyler_610971_combined_model_of__biocrnpyler_715245_biocrnpyler_610971 => rna_proton_pump_atp_synthasebiocrnpyler_610971_combined_model_of__biocrnpyler_715245_biocrnpyler_610971 + protein_proton_pump_atp_synthasebiocrnpyler_610971_combined_model_of__biocrnpyler_715245_biocrnpyler_610971 + protein_Ribo_machinery_atp_synthasebiocrnpyler_610971_combined_model_of__biocrnpyler_715245_biocrnpyler_610971; r11_atp_synthasebiocrnpyler_610971_combined_model_of__biocrnpyler_715245_biocrnpyler_610971_k*complex_protein_Ribo_machinery_rna_proton_pump_atp_synthasebiocrnpyler_610971_combined_model_of__biocrnpyler_715245_biocrnpyler_610971;
    r11_atp_synthasebiocrnpyler_610971_combined_model_of__biocrnpyler_715245_biocrnpyler_610971_k = 0.05;
  r12_atp_synthasebiocrnpyler_610971_combined_model_of__biocrnpyler_715245_biocrnpyler_610971: rna_proton_pump_atp_synthasebiocrnpyler_610971_combined_model_of__biocrnpyler_715245_biocrnpyler_610971 + protein_RNAse_machinery_atp_synthasebiocrnpyler_610971_combined_model_of__biocrnpyler_715245_biocrnpyler_610971 => complex_protein_RNAse_machinery_rna_proton_pump_atp_synthasebiocrnpyler_610971_combined_model_of__biocrnpyler_715245_biocrnpyler_610971; r12_atp_synthasebiocrnpyler_610971_combined_model_of__biocrnpyler_715245_biocrnpyler_610971_k*rna_proton_pump_atp_synthasebiocrnpyler_610971_combined_model_of__biocrnpyler_715245_biocrnpyler_610971*protein_RNAse_machinery_atp_synthasebiocrnpyler_610971_combined_model_of__biocrnpyler_715245_biocrnpyler_610971;
    r12_atp_synthasebiocrnpyler_610971_combined_model_of__biocrnpyler_715245_biocrnpyler_610971_k = 100;
  r13_atp_synthasebiocrnpyler_610971_combined_model_of__biocrnpyler_715245_biocrnpyler_610971: complex_protein_RNAse_machinery_rna_proton_pump_atp_synthasebiocrnpyler_610971_combined_model_of__biocrnpyler_715245_biocrnpyler_610971 => protein_RNAse_machinery_atp_synthasebiocrnpyler_610971_combined_model_of__biocrnpyler_715245_biocrnpyler_610971; r13_atp_synthasebiocrnpyler_610971_combined_model_of__biocrnpyler_715245_biocrnpyler_610971_k*complex_protein_RNAse_machinery_rna_proton_pump_atp_synthasebiocrnpyler_610971_combined_model_of__biocrnpyler_715245_biocrnpyler_610971;
    r13_atp_synthasebiocrnpyler_610971_combined_model_of__biocrnpyler_715245_biocrnpyler_610971_k = 0.001;
  r14_atp_synthasebiocrnpyler_610971_combined_model_of__biocrnpyler_715245_biocrnpyler_610971: protein_proton_pump_atp_synthasebiocrnpyler_610971_combined_model_of__biocrnpyler_715245_biocrnpyler_610971 => protein_proton_pump_b_atp_synthasebiocrnpyler_610971_combined_model_of__biocrnpyler_715245_biocrnpyler_610971; r14_atp_synthasebiocrnpyler_610971_combined_model_of__biocrnpyler_715245_biocrnpyler_610971_k*protein_proton_pump_atp_synthasebiocrnpyler_610971_combined_model_of__biocrnpyler_715245_biocrnpyler_610971;
    r14_atp_synthasebiocrnpyler_610971_combined_model_of__biocrnpyler_715245_biocrnpyler_610971_k = 0.0003;
  r15_atp_synthasebiocrnpyler_610971_combined_model_of__biocrnpyler_715245_biocrnpyler_610971: metabolite_adp_atp_synthasebiocrnpyler_610971_combined_model_of__biocrnpyler_715245_biocrnpyler_610971 + P_virE2biocrnpyler_715245_1_combined_combined_model_of__biocrnpyler_715245_biocrnpyler_610971 => ATP_virE2biocrnpyler_715245_1_combined_combined_model_of__biocrnpyler_715245_biocrnpyler_610971; r15_atp_synthasebiocrnpyler_610971_combined_model_of__biocrnpyler_715245_biocrnpyler_610971_k*metabolite_adp_atp_synthasebiocrnpyler_610971_combined_model_of__biocrnpyler_715245_biocrnpyler_610971*P_virE2biocrnpyler_715245_1_combined_combined_model_of__biocrnpyler_715245_biocrnpyler_610971;
    r15_atp_synthasebiocrnpyler_610971_combined_model_of__biocrnpyler_715245_biocrnpyler_610971_k = 0.2;
  r16_atp_synthasebiocrnpyler_610971_combined_model_of__biocrnpyler_715245_biocrnpyler_610971: 4 proton_inside_H_atp_synthasebiocrnpyler_610971_combined_model_of__biocrnpyler_715245_biocrnpyler_610971 => 4 proton_outside_H_atp_synthasebiocrnpyler_610971_combined_model_of__biocrnpyler_715245_biocrnpyler_610971; r16_atp_synthasebiocrnpyler_610971_combined_model_of__biocrnpyler_715245_biocrnpyler_610971_k*proton_inside_H_atp_synthasebiocrnpyler_610971_combined_model_of__biocrnpyler_715245_biocrnpyler_610971^4;
    r16_atp_synthasebiocrnpyler_610971_combined_model_of__biocrnpyler_715245_biocrnpyler_610971_k = 100;

  // Unit definitions:
  unit square_metre = metre^2;
  unit per_second = 1 / second;
  unit substance = dimensionless;
end
